# TPS5420 5V Supply Design
# Design Parameters
Vin_min := 10 V
Vin_ripple := 300 mV
Vin_max := 35 V
Vout_ripple := 50 mV
Vout_nom := 5 V
Iout_max := 2 A
K_ind := 0.2
Fsw := 500 kHz  # Fsw fixed by TPS5420
# Input Capacitors
C_bulk := 10*10^-6 F
ESRmax := 0.002086 Ω
ESL_max := 1200*10^-9 H
Vin_ripple_calc := Iout_max*0.25/(C_bulk*Fsw) + (Iout_max*ESRmax) = 0.104172 V
I_cin := Iout_max/2 = 1 A  # Choose input capacitors rated for at least 50V with a ripple current capacity for each at 3A at 500kHz
# Output Filter Components
# Inductor Selection
L_min := Vout_nom*(Vin_max - Vout_nom)/(Vin_max*K_ind*Iout_max*Fsw*0.8) = 2.67857e-5 H
L_nom := 33*10^-6 H
I_L_rms := (Iout_max*Iout_max + 1/12*((Vout_nom*(Vin_max - Vout_nom))/(Vin_max*L_nom*Fsw*0.8))^2)^0.5 = 2.00219 A
I_L_peak := (Iout_max + Vout_nom*(Vin_max - Vout_nom)/(1.6*Vin_max*L_nom*Fsw)) = 2.16234 A
# Choose an inductor with at least 2.5A rms and 3A saturation current
# Output Capacitor Selection
Fco := 10 kHz  # Target Crossover frequency
Cout := 1/(3357*L_nom*Fco*Vout_nom) = 0.000180536 s^6*A^3/(kg^2*m^4)
# ~100uF
Nc := 5  # Select 5x 22uF capacitors to approximate 100uF
Cout_esr_max := 1/(2*π*Cout*Fco) = 0.0881567 kg^2*m^4/(s^5*A^3)
# ~88mOhms
Vpp_max := Cout_esr_max*Vout_nom*(Vin_max - Vout_nom)/(Nc*Vin_max*L_nom*Fsw*0.8) = 0.00572446 kg^2*m^4/(s^5*A^2)
# 6mV pk-pk ripple
# Ensure output cap is rated for Vout + 1/2 ripple voltage + derating, ~ 5.006*1.3=6.5V, round up to 25V
# Estimate ripple current max at 150mA
# Output Voltage Set
R1 := 10 kΩ
R1_min := R1*.999
R1_max := R1*1.001
R2 := R1*1.221/(Vout_nom - 1.221 V) = 3231.01 1/A  # 3.24KOhms +/-0.1%
R2_min := R2*.999
R2_max := R2*1.001
Vout_min := R1_min*1.221/R2_max + 1.221 V = 4.99245 V
Vout_max := R1_max*1.221/R2_min + 1.221 V = 5.00757 V
# Boot Cap
# Datasheet gives 0.01uF for the boot capacitor. NP0/COG preferred
# Duty Cycle (Max)
η := 0.9
D_min := Vout_nom/(Vin_max*η) = 0.15873
D_max := Vout_nom/(Vin_min*η) = 0.555556
# Catch Diode
D_reverse_voltage_min := Vin_max + 0.5 V = 35.5 V
D_iout_max := Iout_max + 0.5*I_L_rms = 3.0011 A
# Diodes, Inc B340A has a reverse voltage of 40V, forward current of 3A and forward voltage drop of 0.5V
If := Iout_max*(1 - D_min) = 1.68254 A
If_2 := Iout_max*(1 - D_max) = 0.888889 A
