# Background
# https://www.vishay.com/docs/85943/findtherightesdortvsdiode.pdf
# Circuit Information (What are we trying to protect?)
# ADC128D818CIMTX/NOPB
ADC_V_RWMPlus := 5.3 V
ADC_V_C_Max_Plus := 5 V
ADC_V_RWMMinux := -0.3 V
ADC_V_C_Max_Minux := -0.3 V
ADC_I_R := 1*10^-6 A
Ippm_max := □  # error: Missing term or expression.
ADC_C_D_Max := 22*pF
T_A_Min := 10 C
T_A_Max := 50 C
